// COMSOL Multiphysics 6.1.0.282 model "orig.mph"
// Outline of the model tree

Parameters
  ax = 100[mm]
  ay = 60[mm]
  Nx = 10
  l_box = (Nx+4)*ax
  w_box = ay*Ny
  pml_scaling = 1
  pml_curvature = 3
  R1 = 20[mm]
  xc1 = 0[mm]
  yc1 = 0[mm]
  r1 = 18.1[mm]
  w1 = R1*1.2
  theta1 = 0[deg]
  R2 = R1
  xc2 = dx2
  yc2 = 0 [mm]
  r2 = r1
  w2 = R2*1.3
  theta2 = 0 [deg]
  dx2 = 2.1*R2
  pml = 40[mm]
  Ny = 7
  dx = 2.2*R1
  lda_min = c_a/freq_max
  c_a = 343[m/s]
  freq_max = 3000[Hz]
  theta0 = 0 [deg]

Variables
  var1 "k values"
    k0 = intop1(acpr.k)
    kx0 = k0*cos(theta0)
    ky0 = k0*sin(theta0)

Couplings
  intop1: Integration on points 6

Coordinate systems
  pml1: PML "Perfectly Matched Layer 1" on domains 1-4, 6, 91-93

Geometry
  geom1 "Geometry 1" (2D, length unit m)
    r1: Rectangle
      base = center
      layername = Layer 1
      layer = pml
      layerleft = on
      layerright = on
      layertop = on
      size = {l_box+2*pml, w_box+2*pml}
    c1: Circle | pos = {-2*ax-ax/2-dx/2, 0}; r = R1
    c2: Circle | pos = {-2*ax-ax/2-dx/2, 0}; r = r1
    dif1: Difference | input = c1; input2 = c2
    r2: Rectangle | pos = {-2*ax-ax/2-dx/2, 0-w1/2}; size = {1.5*R1, w1}
    dif2: Difference "Resonator 1" | input = dif1; input2 = r2
    copy1: Copy | input = dif2; keep = on; displx = dx; disply = 0
    rot1: Rotate | input = copy1; rot = 180; pos = {-2*ax-ax/2+dx/2, 0}
    arr1: Array | input = dif2, rot1; size = 3; type = linear; linearsize = 3; displ = {ax, 0}
    c3: Circle | pos = {2*ax+ax/2+dx/2, 0}; r = R2
    c4: Circle | pos = {2*ax+ax/2+dx/2, 0}; r = r2
    dif3: Difference | input = c3; input2 = c4
    r4: Rectangle | pos = {2*ax+ax/2+dx/2, 0-w2/2}; size = {1.5*R2, w2}
    dif4: Difference "Resonator 1.1" | input = dif3; input2 = r4
    copy2: Copy | input = dif4; keep = on; displx = -dx2; disply = 0
    rot2: Rotate | input = dif4; rot = 180; pos = {2*ax+ax/2+dx/2, 0}
    arr2: Array | input = copy2, rot2; size = 3; type = linear; linearsize = 3; displ = {-ax, 0}
    arr3: Array | input = arr1, arr2; size = Ny; type = linear; linearsize = Ny; displ = {0, ay}
    mov1: Move | input = arr3; displx = 0; disply = -ay*(Ny-1)/2
    pt1: Point | p = {-10/2*ax, }
    pt2: Point | p = {10/2*ax, 0}
    pt3: Point | p = {11/2*ax, ay}
    pt4: Point | p = {10.5/2*ax, -ay}
    pt5: Point | p = {12/2*ax, 2*ay}
    pt6: Point | p = {11.5/2*ax, -2*ay}
    pt7: Point | p = {10.5/2*ax, -3*ay}
    pt8: Point | p = {12/2*ax, 3*ay}
    fin: Finalize "Form Union"

Materials
  mat1: Common "Air" on domains 1-6, 91-93
    def "Basic"
      thermalexpansioncoefficient = alpha_p(pA,T)
      molarmass = 0.02897[kg/mol]
      bulkviscosity = muB(T)
      relpermeability = 1
      relpermittivity = 1
      dynamicviscosity = eta(T)
      ratioofspecificheat = 1.4
      electricconductivity = 0[S/m]
      heatcapacity = Cp(T)
      density = rho(pA,T)
      thermalconductivity = k(T)
      soundspeed = cs(T)
      eta: Piecewise | arg = T; pieces = {200.0, 1600.0, -8.38278E-7+8.35717342E-8*T^1-7.69429583E-11*T^2+4.6437266E-14*T^3-1.06585607E-17*T^4}; argunit = K; fununit = Pa*s
      Cp: Piecewise | arg = T; pieces = {200.0, 1600.0, 1047.63657-0.372589265*T^1+9.45304214E-4*T^2-6.02409443E-7*T^3+1.2858961E-10*T^4}; argunit = K; fununit = J/(kg*K)
      rho: Analytic | expr = pA*0.02897/R_const[K*mol/J]/T; args = {pA, T}; fununit = kg/m^3; argunit = {Pa, K}
      k: Piecewise | arg = T; pieces = {200.0, 1600.0, -0.00227583562+1.15480022E-4*T^1-7.90252856E-8*T^2+4.11702505E-11*T^3-7.43864331E-15*T^4}; argunit = K; fununit = W/(m*K)
      cs: Analytic | expr = sqrt(1.4*R_const[K*mol/J]/0.02897*T); args = T; fununit = m/s; argunit = K
      an1: Analytic | funcname = alpha_p; expr = -1/rho(pA,T)*d(rho(pA,T),T); args = {pA, T}; fununit = 1/K; argunit = {Pa, K}
      an2: Analytic "Analytic 2a" | funcname = muB; expr = 0.6*eta(T); args = T; fununit = Pa*s; argunit = K
    RefractiveIndex
      n = 1
      ki = 0
    NonlinearModel
      BA = (def.gamma+1)/2
    idealGas
      Rs = R_const/Mn
      heatcapacity = Cp(T)
      ratioofspecificheat = 1.4
      molarmass = 0.02897
      Cp: Piecewise | arg = T; pieces = {200.0, 1600.0, 1047.63657-0.372589265*T^1+9.45304214E-4*T^2-6.02409443E-7*T^3+1.2858961E-10*T^4}; argunit = K; fununit = J/(kg*K)
  mat2: Common "Acrylic plastic" on domains 7-90
    def "Basic"
      thermalexpansioncoefficient = 7.0e-5[1/K]
      heatcapacity = 1470[J/(kg*K)]
      density = 1190[kg/m^3]
      thermalconductivity = 0.18[W/(m*K)]
      soundspeed = 2750
    Enu "Young's modulus and Poisson's ratio"
      E = 3.2[GPa]
      nu = 0.35

Physics
  acpr: PressureAcoustics "Pressure Acoustics, Frequency Domain" on domains 1-6, 91-93
    dependent variable p
    cref.cref = 343[m/s]
    fpam1: FrequencyPressureAcousticsModel "Pressure Acoustics 1" (default)
    shb1: SoundHard "Sound Hard Boundary (Wall) 1" (default)
    init1: init "Initial Values 1" (default)
    bpf1: BackgroundPressureField on domains 5 | pamp = 1; c_mat = from_mat

Mesh
  mesh1 "Mesh 1"
    size: MeshSizeDefault | hmax = lda_min/5; hnarrow = 3; custom = on
    ftri1: FreeTri "Free Triangular 1" on domains 5
    map1: Map "Mapped 1" on domains 1-4, 6, 91-93
      dis1: Distribution on boundaries 1, 2, 187, 188

Studies
  std1 "Study 1"
    freq: Frequency "Frequency Domain" | plist = range(500,1,3000)

Solver configurations
  sol1 "Solution 1" (study std1)
    v1: Variables "Dependent Variables 1"
    s1: Stationary "Stationary Solver 1" | linpmethod = sol
      dDef: Direct
      p1: Parametric | pname = freq; plistarr = range(500,1,3000); punit = Hz; pcontinuationmode = no
      fc1: FullyCoupled | linsolver = dDef

Datasets
  dset1: Solution | solution = sol1

Derived values
  pev1: EvalPoint "Point Evaluation 1" on points 850-856
    data = dset1
    table = tbl2
    expr = acpr.p_t
    summethod = average

Tables
  tbl1: Table
    // Point Evaluation 1
    freq (Hz)
    500
    501
    502
    503
    504
    505
    506
    507
    508
    509
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  tbl2: Table
    // Point Evaluation 1
    freq (Hz) | Point average: Total acoustic pressure (Pa)
    500 | 1.06028-0.914261i
    501 | 1.04543-0.930258i
    502 | 1.03034-0.946038i
    503 | 1.01501-0.961601i
    504 | 0.999453-0.976942i
    505 | 0.98366-0.992058i
    506 | 0.967635-1.00695i
    507 | 0.951381-1.02161i
    508 | 0.9349-1.03603i
    509 | 0.918193-1.05022i
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
Plots
  pg1: PlotGroup2D "Acoustic Pressure (acpr)" | data = dset1
    surf1: Surface | expr = acpr.p_t
  pg2: PlotGroup2D "Sound Pressure Level (acpr)" | data = dset1
    surf1: Surface | expr = acpr.Lp_t
  pg3: PlotGroup1D "1D Plot Group 3" | data = none
  pg4: PlotGroup1D "1D Plot Group 4" | data = none
    tblp1: Table "Table Graph 1" | table = tbl1
  pg5: PlotGroup1D "1D Plot Group 5" | data = none
    tblp1: Table "Table Graph 1" | table = tbl2